<?xml version="1.0" ?>

<!-- Add a contraint : Fixed -->
<Node name="root" dt="0.01" gravity="0 0 0">

    <Node name="plugins">
        <RequiredPlugin name="Sofa.Component.IO.Mesh"/> <!-- Needed to use components [MeshGmshLoader] -->
        <RequiredPlugin name="Sofa.Component.LinearSolver.Iterative"/> <!-- Needed to use components [CGLinearSolver] -->
        <RequiredPlugin name="Sofa.Component.Mass"/> <!-- Needed to use components [MeshMatrixMass] -->
        <RequiredPlugin name="Sofa.Component.MechanicalLoad"/> <!-- Needed to use components [ConstantForceField] -->
        <RequiredPlugin name="Sofa.Component.StateContainer"/> <!-- Needed to use components [MechanicalObject] -->
        <RequiredPlugin name="Sofa.Component.ODESolver.Backward"/> <!-- Needed to use components [EulerImplicitSolver] -->
        <RequiredPlugin name="Sofa.Component.SolidMechanics.FEM.Elastic"/> <!-- Needed to use components [TetrahedronFEMForceField] -->
        <RequiredPlugin name="Sofa.Component.Topology.Container.Dynamic"/> <!-- Needed to use components [TetrahedronSetGeometryAlgorithms, TetrahedronSetTopologyContainer] -->
        <RequiredPlugin name="Sofa.Component.Visual"/> <!-- Needed to use components [VisualStyle] -->
        <RequiredPlugin name="Sofa.GL.Component.Rendering3D"/> <!-- Needed to use components [OglModel] -->
        <RequiredPlugin name="Sofa.Component.Topology.Mapping"/> <!-- Needed to use components [Tetra2TriangleTopologicalMapping] -->
        <RequiredPlugin name="Sofa.Component.Constraint.Projective"/> <!-- Needed to use components [FixedConstraint] -->
        <RequiredPlugin name="Sofa.Component.Mapping.Linear"/> <!-- Needed to use components [BarycentricMapping] -->

        <RequiredPlugin name="Sofa.Component.Collision.Detection.Algorithm"/> <!-- Needed to use components [BVHNarrowPhase, BruteForceBroadPhase, DefaultPipeline] -->
        <RequiredPlugin name="Sofa.Component.Collision.Detection.Intersection"/> <!-- Needed to use components [MinProximityIntersection] -->
        <RequiredPlugin name="Sofa.Component.Collision.Geometry"/> <!-- Needed to use components [TriangleCollisionModel] -->
        <RequiredPlugin name="Sofa.Component.Collision.Response.Contact"/> <!-- Needed to use components [DefaultContactManager] -->
        <RequiredPlugin name="Sofa.Component.Topology.Container.Constant"/> <!-- Needed to use components [MeshTopology] -->

        <RequiredPlugin name="Sofa.Component.AnimationLoop"/> <!-- Needed to use components [FreeMotionAnimationLoop] -->
        <RequiredPlugin name="Sofa.Component.Constraint.Lagrangian.Correction"/> <!-- Needed to use components [UncoupledConstraintCorrection] -->
        <RequiredPlugin name="Sofa.Component.Constraint.Lagrangian.Solver"/> <!-- Needed to use components [GenericConstraintSolver] -->
    </Node>

    <!-- Dedicated animation loop: solving the constraints, like contacts -->
    <FreeMotionAnimationLoop computeBoundingBox="false"/>

    <VisualStyle displayFlags="showCollisionModels hideVisualModels" />

    <!-- Constraint solver -->
    <GenericConstraintSolver maxIt="1000" tolerance="1e-6" />

    <!-- Collision pipeline: broad, narrow phase and response -->
    <CollisionPipeline />
    <BruteForceBroadPhase/>
    <BVHNarrowPhase/>
    <MinProximityIntersection name="Proximity" alarmDistance="0.5" contactDistance="0.25"/>
    <!-- Constraint resolution using Lagrange multipliers -->
    <CollisionResponse name="Response" response="FrictionContactConstraint"/>


    <MeshGmshLoader name="meshLoaderCoarse" filename="mesh/liver.msh" />
    <MeshOBJLoader  name="meshLoaderFine" filename="mesh/liver-smooth.obj" />


    <Node name="Liver">
        <EulerImplicitSolver />
        <CGLinearSolver iterations="200" tolerance="1e-09" threshold="1e-09"/>
        <TetrahedronSetTopologyContainer name="topo" src="@../meshLoaderCoarse" />
        <TetrahedronSetGeometryAlgorithms template="Vec3d" name="GeomAlgo"/>
        <MechanicalObject template="Vec3d" name="MechanicalModel" showObject="1"/>
        <TetrahedronFEMForceField name="FEM" youngModulus="1000" poissonRatio="0.4"  method="large" />
        <MeshMatrixMass massDensity="1" topology="@topo"/>
        <ConstantForceField totalForce="100 0 0" />

        <FixedProjectiveConstraint indices="1 3 50" />

        <!-- Allow to apply correction motion further to constraint resolution -->
        <UncoupledConstraintCorrection defaultCompliance="1e-5"/>

        <Node name="Visual" >
            <OglModel  name="VisualModel" src="@../../meshLoaderFine" />
            <BarycentricMapping name="VisualMapping" input="@../MechanicalModel" output="@VisualModel" />
        </Node>

        <Node name="Collision">
            <MeshTopology src="@../../meshLoaderFine"/>
            <MechanicalObject name="CollisionMO" scale="1.0"/>
            <TriangleCollisionModel name="CollisionModel" />
            <BarycentricMapping name="CollisionMapping" input="@../MechanicalModel" output="@CollisionMO" />
        </Node>

    </Node>


    <Node name="Sphere">
        <EulerImplicitSolver rayleighStiffness="0"/>
        <CGLinearSolver iterations="200" tolerance="1e-06" threshold="1e-06"/>
        <MechanicalObject template="Rigid3d" name="myParticle" position="-2 10 0    0 0 0 1" showObject="1" showObjectScale="0.5" />
        <UniformMass totalMass="1" />
        <ConstantForceField forces="0 -1 0 0 0 0" />

        <UncoupledConstraintCorrection defaultCompliance="1e-6"/>

        <SphereCollisionModel name="Floor" radius="1" simulated="1" moving="1" />
    </Node>
</Node>
